from16(x) :=
    "10" if x == "A"
    "11" if x == "B"
    "12" if x == "C"
    "13" if x == "D"
    "14" if x == "E"
    "15" if x == "F"
    x otherwise
to16(x) :=
    res ← ""
    res ← "A" if x == "10"
    res ← "B" if x == "11"
    res ← "C" if x == "12"
    res ← "D" if x == "13"
    res ← "E" if x == "14"
    res ← "F" if x == "15"
    res ← x otherwise
    res
to10(base, x) :=
    x ← num2str(x) if IsString(x) == 0
    x ← substr(x, 0, strlen(x) - 1) if substr(x, strlen(x) - 1, 1) == "h"
    len ← strlen(x)
    res ← 0
    for i ∈ 0 .. len - 1
        b ← from16(substr(x, len - i - 1, 1))
        res ← res + str2num(b)*base^i
        i ← i + 1
    res
convert(base, target, x) :=
    x ← num2str(x) if IsString(x) == 0
    x ← substr(x, 0, strlen(x) - 1) if substr(x, strlen(x) - 1, 1) == "h"
    x10 ← to10(base, x)
    res ← ""
    res ← num2str(x10) if target == 10
    otherwise
        res ← ""
        while x10 > 0
            buf ← num2str(mod(x10, target))
            res ← concat(to16(buf), res)
            x10 ← floor(x10/target)
    res if target == 2
    otherwise
        try
            res ← str2num(res)
        on error
            res ← concat(res, "h")
    res
# Описание функции convert(base, target, x):
# функция переводит
# число x
# из системы счисления base
# в систему счисления target
#
# При этом:
# 1. шаблон записи:
# convert(base, target, x)
# 2. числа в 16 СС писать ТОЛЬКО в формате текста, начиная с цифры
# (т.е. типа "0Fh")
# 3. числа в 2 СС можно текстом или цифрами
#
# Примеры ниже:
convert(8, 16, "123") = 53
a := convert(16, 2, "0F3h") = "11110011"
convert(10, 16, "12") = "Ch"
convert(2, 16, a) = "F3h"
# ==============================================================
# Вычисления можно начать ниже:
X := 9
# Вычислить M = (Z' or X' and Y) + (X' / Z),
# где Z', X' - получены в результате инверсии 4 старших бит Z и X соответсвенно
Y := 44
Z := 12
convert(10, 16, X) = 9
convert(10, 16, Y) = "2Ch"
convert(10, 16, Z) = "Ch"
X' := 11110000
Z' := 11110000
convert(2, 16, X') = "F0h"
convert(2, 10, X') = 240
X'10 := 240
convert(2, 16, Z') = "F0h"
convert(2, 10, Z') = 240
Z'10 := 240
# (X' / Z)
X'10/Z = 20
convert(10, 16, X'10/Z) = 14  # Ответ скобки, совпадает со значением из регистра EAX, 26 строка кода
# (Z' or X' and Y)
convert(10, 2, Y) = "101100"
Y2 := 101100
Z' or X' = 1
(Z' or X') and Y2 = 1
